// SBML level 3 version 2

model RBC_PFK()

  // Compartments:
  compartment c; c is "Cytosol";
  compartment b; b is "boundary";

  // Species:
  species M_glc__D_c in c = 1; M_glc__D_c is "D-Glucose";
  species M_g6p_c in c = 0.0486; M_g6p_c is "D-Glucose 6-phosphate";
  species M_f6p_c in c = 0.0198; M_f6p_c is "D-Fructose 6-phosphate";
  species M_fdp_c in c = 0.0146; M_fdp_c is "D-Fructose 1,6-bisphosphate";
  species M_dhap_c in c = 0.16; M_dhap_c is "Dihydroxyacetone phosphate";
  species M_g3p_c in c = 0.00728; M_g3p_c is "Glyceraldehyde 3-phosphate";
  species M__13dpg_c in c = 0.000243; M__13dpg_c is "3-Phospho-D-glyceroyl phosphate";
  species M__3pg_c in c = 0.0773; M__3pg_c is "3-Phospho-D-glycerate";
  species M__2pg_c in c = 0.0113; M__2pg_c is "D-Glycerate 2-phosphate";
  species M_pep_c in c = 0.017; M_pep_c is "Phosphoenolpyruvate";
  species M_pyr_c in c = 0.060301; M_pyr_c is "Pyruvate";
  species M_lac__L_c in c = 1.36; M_lac__L_c is "L-Lactate";
  species M__6pgl_c in c = 0.00175424; M__6pgl_c is "6-Phospho-D-gluco-1,5-lactone";
  species M__6pgc_c in c = 0.0374753; M__6pgc_c is "6-Phospho-D-gluconate";
  species M_ru5p__D_c in c = 0.00493679; M_ru5p__D_c is "D-Ribulose 5-phosphate";
  species M_xu5p__D_c in c = 0.0147842; M_xu5p__D_c is "D-Xylulose 5-phosphate";
  species M_r5p_c in c = 0.0126689; M_r5p_c is "Alpha-D-Ribose 5-phosphate";
  species M_s7p_c in c = 0.023988; M_s7p_c is "Sedoheptulose 7-phosphate";
  species M_e4p_c in c = 0.00507507; M_e4p_c is "D-Erythrose 4-phosphate";
  species M_ade_c in c = 0.001; M_ade_c is "Adenine";
  species M_adn_c in c = 0.0012; M_adn_c is "Adenosine";
  species M_imp_c in c = 0.01; M_imp_c is "Inosine monophosphate";
  species M_ins_c in c = 0.001; M_ins_c is "Inosine";
  species M_hxan_c in c = 0.002; M_hxan_c is "Hypoxanthine";
  species M_r1p_c in c = 0.06; M_r1p_c is "Alpha-D-Ribose 1-phosphate";
  species M_prpp_c in c = 0.005; M_prpp_c is "5-Phospho-alpha-D-ribose 1-diphosphate";
  species M__23dpg_c in c = 3.1; M__23dpg_c is "2,3-Disphospho-D-glycerate";
  species M_hb_c in c = 0.0596253; M_hb_c is "Hemoglobin";
  species M_hb_1o2_c in c = 0.05008529; M_hb_1o2_c is "Oxyhemoglobin (1)";
  species M_hb_2o2_c in c = 0.07362533; M_hb_2o2_c is "Oxyhemoglobin (2)";
  species M_hb_3o2_c in c = 0.2628417; M_hb_3o2_c is "Oxyhemoglobin (3)";
  species M_hb_4o2_c in c = 6.807613; M_hb_4o2_c is "Oxyhemoglobin (4)";
  species M_dhb_c in c = 0.04620961; M_dhb_c is "Deoxyhemoglobin";
  species M_nad_c in c = 0.0589; M_nad_c is "Nicotinamide adenine dinucleotide";
  species M_nadh_c in c = 0.0301; M_nadh_c is "Nicotinamide adenine dinucleotide - reduced";
  species M_amp_c in c = 0.0867281; M_amp_c is "AMP";
  species M_adp_c in c = 0.29; M_adp_c is "ADP";
  species M_atp_c in c = 1.6; M_atp_c is "ATP";
  species M_nadp_c in c = 0.0002; M_nadp_c is "Nicotinamide adenine dinucleotide phosphate";
  species M_nadph_c in c = 0.0658; M_nadph_c is "Nicotinamide adenine dinucleotide phosphate - reduced";
  species M_gthrd_c in c = 3.2; M_gthrd_c is "Reduced glutathione";
  species M_gthox_c in c = 0.12; M_gthox_c is "Oxidized glutathione";
  species M_pi_c in c = 2.5; M_pi_c is "Phosphate";
  species M_h_c in c = 8.99757e-5; M_h_c is "H+";
  species M_h2o_c in c = 1; M_h2o_c is "H2O";
  species M_co2_c in c = 1; M_co2_c is "CO2";
  species M_nh3_c in c = 0.091002; M_nh3_c is "Ammonia";
  species M_o2_c in c = 0.0200788; M_o2_c is "Oxygen";
  species M_pfk_R0_A_c in c = 2.944e-9; M_pfk_R0_A_c is "PFK-atp complex";
  species M_pfk_R0_c in c = 1.65e-9; M_pfk_R0_c is "PFK";
  species M_pfk_R0_AF_c in c = 3.43e-10; M_pfk_R0_AF_c is "PFK-atp-f6p complex";
  species M_pfk_R1_c in c = 1.7344e-8; M_pfk_R1_c is "PFK; 1 amp";
  species M_pfk_T0_c in c = 2e-12; M_pfk_T0_c is "PFK";
  species M_pfk_T1_c in c = 1.16e-10; M_pfk_T1_c is "PFK; 1 atp";
  species M_pfk_R1_A_c in c = 3.0951e-8; M_pfk_R1_A_c is "PFK-atp complex; 1 amp";
  species M_pfk_R1_AF_c in c = 3.601e-9; M_pfk_R1_AF_c is "PFK-atp-f6p complex; 1 amp";
  species M_pfk_R2_c in c = 6.8372e-8; M_pfk_R2_c is "PFK; 2 amp";
  species M_pfk_T2_c in c = 2.788e-9; M_pfk_T2_c is "PFK; 2 atp";
  species M_pfk_R2_A_c in c = 1.22015e-7; M_pfk_R2_A_c is "PFK-atp complex; 2 amp";
  species M_pfk_R2_AF_c in c = 1.4198e-8; M_pfk_R2_AF_c is "PFK-atp-f6p complex; 2 amp";
  species M_pfk_R3_c in c = 1.19793e-7; M_pfk_R3_c is "PFK; 3 amp";
  species M_pfk_T3_c in c = 2.9734e-8; M_pfk_T3_c is "PFK; 3 atp";
  species M_pfk_R3_A_c in c = 2.13781e-7; M_pfk_R3_A_c is "PFK-atp complex; 3 amp";
  species M_pfk_R3_AF_c in c = 2.4876e-8; M_pfk_R3_AF_c is "PFK-atp-f6p complex; 3 amp";
  species M_pfk_R4_c in c = 7.8708e-8; M_pfk_R4_c is "PFK; 4 amp";
  species M_pfk_T4_c in c = 1.18934e-7; M_pfk_T4_c is "PFK; 4 atp";
  species M_pfk_R4_A_c in c = 1.40461e-7; M_pfk_R4_A_c is "PFK-atp complex; 4 amp";
  species M_pfk_R4_AF_c in c = 1.6344e-8; M_pfk_R4_AF_c is "PFK-atp-f6p complex; 4 amp";
  species $M_glc__D_b in b = 1;
  species $M_h2o_b in b = 1;
  species $M_h_b in b = 6.30957e-5;
  species $M_lac__L_b in b = 1;
  species $M_pi_b in b = 2.5;
  species $M_pyr_b in b = 0.06;
  species $M_co2_b in b = 1;
  species $M_ade_b in b = 0.001;
  species $M_adn_b in b = 0.0012;
  species $M_hxan_b in b = 0.002;
  species $M_ins_b in b = 0.001;
  species $M_nh3_b in b = 0.091002;
  species $M_o2_b in b = 0.0200788;

  // Parameters:
  kf_R_HEX1 = 0.7000073;
  kf_R_PGI = 2961.111;
  kf_R_FBA = 2797.449;
  kf_R_TPI = 33.90583;
  kf_R_GAPD = 3479.76;
  kf_R_PGK = 1061655;
  kf_R_PGM = 5017.11;
  kf_R_ENO = 1817.545;
  kf_R_PYK = 468.247;
  kf_R_LDH_L = 1150.285;
  kf_R_G6PDH2r = 21864.59;
  kf_R_PGL = 122.3231;
  kf_R_GND = 29287.81;
  kf_R_RPE = 22392.05;
  kf_R_RPI = 2021.058;
  kf_R_TKT1 = 2338.07;
  kf_R_TKT2 = 1600.141;
  kf_R_TALA = 1237.363;
  kf_R_ADNK1 = 62.5;
  kf_R_NTD7 = 1.383635;
  kf_R_ADA = 8.333333;
  kf_R_AMPDA = 0.161424;
  kf_R_NTD11 = 1.4;
  kf_R_PUNP5 = 83.14286;
  kf_R_PPM = 1.642747;
  kf_R_PRPPS = 0.6906677;
  kf_R_ADPT = 2800;
  kf_R_ADK1 = 100000;
  kf_R_DPGM = 1824.937;
  kf_R_DPGase = 0.1422581;
  kf_R_HBDPG = 519613;
  kf_R_HBO1 = 506935;
  kf_R_HBO2 = 511077;
  kf_R_HBO3 = 509243;
  kf_R_HBO4 = 501595;
  kf_R_ATPM = 1.402083;
  kf_R_DM_nadh = 7.44186;
  kf_R_GTHOr = 53.32981;
  kf_R_GSHR = 0.04125737;
  kf_R_SK_glc__D_c = 1.12;
  kf_R_SK_pyr_c = 744.186;
  kf_R_SK_lac__L_c = 5.789815;
  kf_R_SK_ade_c = 100000;
  kf_R_SK_adn_c = 100000;
  kf_R_SK_ins_c = 100000;
  kf_R_SK_hxan_c = 100000;
  kf_R_SK_pi_c = 100000;
  kf_R_SK_h_c = 133792.2;
  kf_R_SK_h2o_c = 100000;
  kf_R_SK_co2_c = 100000;
  kf_R_SK_nh3_c = 100000;
  kf_R_SK_o2_c = 509726;
  kf_R_PFK_L = 1000000000000;
  Keq_R_HEX1 = 850;
  Keq_R_PGI = 0.41;
  Keq_R_FBA = 0.082;
  Keq_R_TPI = 0.0571429;
  Keq_R_GAPD = 0.0179;
  Keq_R_PGK = 1800;
  Keq_R_PGM = 0.147059;
  Keq_R_ENO = 1.69492;
  Keq_R_PYK = 363000;
  Keq_R_LDH_L = 26300;
  Keq_R_G6PDH2r = 1000;
  Keq_R_PGL = 1000;
  Keq_R_GND = 1000;
  Keq_R_RPE = 3;
  Keq_R_RPI = 2.57;
  Keq_R_TKT1 = 1.2;
  Keq_R_TKT2 = 10.3;
  Keq_R_TALA = 1.05;
  Keq_R_ADNK1 = INF;
  Keq_R_NTD7 = INF;
  Keq_R_ADA = INF;
  Keq_R_AMPDA = INF;
  Keq_R_NTD11 = INF;
  Keq_R_PUNP5 = 0.09;
  Keq_R_PPM = 13.3;
  Keq_R_PRPPS = INF;
  Keq_R_ADPT = INF;
  Keq_R_ADK1 = 1.65;
  Keq_R_DPGM = 2300000;
  Keq_R_DPGase = INF;
  Keq_R_HBDPG = 0.25;
  Keq_R_HBO1 = 41.8352;
  Keq_R_HBO2 = 73.2115;
  Keq_R_HBO3 = 177.799;
  Keq_R_HBO4 = 1289.92;
  Keq_R_ATPM = INF;
  Keq_R_DM_nadh = INF;
  Keq_R_GTHOr = 100;
  Keq_R_GSHR = 2;
  Keq_R_SK_glc__D_c = INF;
  Keq_R_SK_pyr_c = 1;
  Keq_R_SK_lac__L_c = 1;
  Keq_R_SK_ade_c = 1;
  Keq_R_SK_adn_c = 1;
  Keq_R_SK_ins_c = 1;
  Keq_R_SK_hxan_c = 1;
  Keq_R_SK_pi_c = 1;
  Keq_R_SK_h_c = 1;
  Keq_R_SK_h2o_c = 1;
  Keq_R_SK_co2_c = 1;
  Keq_R_SK_nh3_c = 1;
  Keq_R_SK_o2_c = 1;
  Keq_R_PFK_R03 = INF;
  Keq_R_PFK_R13 = INF;
  Keq_R_PFK_R23 = INF;
  Keq_R_PFK_R33 = INF;
  Keq_R_PFK_R43 = INF;
  Keq_R_PFK_L = 0.0011;
  v_R_HEX1 = 9.5e-7;
  v_R_PGI = -0.19417831;
  v_R_FBA = 0;
  v_R_TPI = 0;
  v_R_GAPD = 0.09708918;
  v_R_PGK = -5.041e-5;
  v_R_PGM = 0.02759345;
  v_R_ENO = 0.01737345;
  v_R_PYK = 5.136e-5;
  v_R_LDH_L = 0.08724313;
  v_R_G6PDH2r = 0.19417925;
  v_R_PGL = 0.19417925;
  v_R_GND = 0.19417925;
  v_R_RPE = 0.19417833;
  v_R_RPI = 9.2e-7;
  v_R_TKT1 = 0.09708918;
  v_R_TKT2 = 0.09708915;
  v_R_TALA = 0.09708915;
  v_R_ADNK1 = 0;
  v_R_NTD7 = 0;
  v_R_ADA = 0.00999917;
  v_R_AMPDA = 0;
  v_R_NTD11 = 0;
  v_R_PUNP5 = 0.09708825;
  v_R_PPM = 0.09708825;
  v_R_PRPPS = 0;
  v_R_ADPT = 0;
  v_R_ADK1 = 0;
  v_R_DPGM = 0.09713959;
  v_R_DPGase = 0.09713982;
  v_R_HBDPG = 0;
  v_R_HBO1 = 0;
  v_R_HBO2 = 0;
  v_R_HBO3 = 0;
  v_R_HBO4 = 0;
  v_R_ATPM = 0;
  v_R_DM_nadh = 0.00984605;
  v_R_GTHOr = 0.38835851;
  v_R_GSHR = 0.38835852;
  v_R_SK_glc__D_c = 1.12;
  v_R_SK_pyr_c = -0.08719177;
  v_R_SK_lac__L_c = 0.08724313;
  v_R_SK_ade_c = 0;
  v_R_SK_adn_c = -0.00999917;
  v_R_SK_ins_c = -0.08708909;
  v_R_SK_hxan_c = 0.09708825;
  v_R_SK_pi_c = -0.09703761;
  v_R_SK_h_c = 0.8934983;
  v_R_SK_h2o_c = -0.28394479;
  v_R_SK_co2_c = 0.19417925;
  v_R_SK_nh3_c = 0.00999917;
  v_R_SK_o2_c = -1e-8;
  v_R_PFK_R01 = 0;
  v_R_PFK_R02 = 0;
  v_R_PFK_R03 = 0;
  v_R_PFK_R10 = 0;
  v_R_PFK_T1 = 0;
  v_R_PFK_R11 = 0;
  v_R_PFK_R12 = 0;
  v_R_PFK_R13 = 0;
  v_R_PFK_R20 = 0;
  v_R_PFK_T2 = 0;
  v_R_PFK_R21 = 0;
  v_R_PFK_R22 = 0;
  v_R_PFK_R23 = 0;
  v_R_PFK_R30 = 0;
  v_R_PFK_T3 = 0;
  v_R_PFK_R31 = 0;
  v_R_PFK_R32 = 0;
  v_R_PFK_R33 = 0;
  v_R_PFK_R40 = 0;
  v_R_PFK_T4 = 0;
  v_R_PFK_R41 = 0;
  v_R_PFK_R42 = 0;
  v_R_PFK_R43 = 0;
  v_R_PFK_L = 0;
  Keq_PFK_A = 14.70588;
  Keq_PFK_ACT = 30.30303;
  Keq_PFK_F = 10;
  Keq_PFK_I = 10;
  Keq_R_PFK_L = 0.0011;
  kf_PFK = 307000;
  kf_PFK_A = 125000;
  kf_PFK_ACT = 1000000;
  kf_PFK_F = 50500000;
  kf_PFK_I = 1000000;

  // Reactions:
  R_HEX1: M_atp_c + M_glc__D_c -> M_adp_c + M_g6p_c + M_h_c; kf_R_HEX1*(M_atp_c*M_glc__D_c - M_adp_c*M_g6p_c/Keq_R_HEX1); R_HEX1 is "Hexokinase (D-glucose:ATP)";
  R_PGI: M_g6p_c -> M_f6p_c; kf_R_PGI*(M_g6p_c - M_f6p_c/Keq_R_PGI); R_PGI is "Glucose-6-phosphate isomerase";
  R_FBA: M_fdp_c -> M_dhap_c + M_g3p_c; kf_R_FBA*(M_fdp_c - M_dhap_c*M_g3p_c/Keq_R_FBA); R_FBA is "Fructose-bisphosphate aldolase";
  R_TPI: M_dhap_c -> M_g3p_c; kf_R_TPI*(M_dhap_c - M_g3p_c/Keq_R_TPI); R_TPI is "Triose-phosphate isomerase";
  R_GAPD: M_g3p_c + M_nad_c + M_pi_c -> M__13dpg_c + M_h_c + M_nadh_c; kf_R_GAPD*(M_g3p_c*M_nad_c*M_pi_c - M__13dpg_c*M_nadh_c/Keq_R_GAPD); R_GAPD is "Glyceraldehyde-3-phosphate dehydrogenase";
  R_PGK: M__13dpg_c + M_adp_c -> M__3pg_c + M_atp_c; kf_R_PGK*(M__13dpg_c*M_adp_c - M__3pg_c*M_atp_c/Keq_R_PGK); R_PGK is "Phosphoglycerate kinase";
  R_PGM: M__3pg_c -> M__2pg_c; kf_R_PGM*(M__3pg_c - M__2pg_c/Keq_R_PGM); R_PGM is "Phosphoglycerate mutase";
  R_ENO: M__2pg_c -> M_h2o_c + M_pep_c; kf_R_ENO*(M__2pg_c - M_pep_c/Keq_R_ENO); R_ENO is "Enolase";
  R_PYK: M_adp_c + M_h_c + M_pep_c -> M_atp_c + M_pyr_c; kf_R_PYK*(M_adp_c*M_pep_c - M_atp_c*M_pyr_c/Keq_R_PYK); R_PYK is "Pyruvate kinase";
  R_LDH_L: M_h_c + M_nadh_c + M_pyr_c -> M_lac__L_c + M_nad_c; kf_R_LDH_L*(M_nadh_c*M_pyr_c - M_lac__L_c*M_nad_c/Keq_R_LDH_L); R_LDH_L is "L-lactate dehydrogenase";
  R_G6PDH2r: M_nadp_c + M_g6p_c -> M__6pgl_c + M_nadph_c + M_h_c; kf_R_G6PDH2r*(M_g6p_c*M_nadp_c - M__6pgl_c*M_nadph_c/Keq_R_G6PDH2r); R_G6PDH2r is "Glucose 6-phosphate dehydrogenase";
  R_PGL: M__6pgl_c + M_h2o_c -> M__6pgc_c + M_h_c; kf_R_PGL*(M__6pgl_c - M__6pgc_c/Keq_R_PGL); R_PGL is "6-phosphogluconolactonase";
  R_GND: M__6pgc_c + M_nadp_c -> M_co2_c + M_ru5p__D_c + M_nadph_c; kf_R_GND*(M__6pgc_c*M_nadp_c - M_co2_c*M_nadph_c*M_ru5p__D_c/Keq_R_GND); R_GND is "Phosphogluconate dehydrogenase";
  R_RPE: M_ru5p__D_c -> M_xu5p__D_c; kf_R_RPE*(M_ru5p__D_c - M_xu5p__D_c/Keq_R_RPE); R_RPE is "Ribulose 5-phosphate 3-epimerase";
  R_RPI: M_ru5p__D_c -> M_r5p_c; kf_R_RPI*(M_ru5p__D_c - M_r5p_c/Keq_R_RPI); R_RPI is "Ribulose 5-Phosphate Isomerase";
  R_TKT1: M_r5p_c + M_xu5p__D_c -> M_s7p_c + M_g3p_c; kf_R_TKT1*(M_r5p_c*M_xu5p__D_c - M_g3p_c*M_s7p_c/Keq_R_TKT1); R_TKT1 is "Transketolase";
  R_TKT2: M_e4p_c + M_xu5p__D_c -> M_f6p_c + M_g3p_c; kf_R_TKT2*(M_e4p_c*M_xu5p__D_c - M_f6p_c*M_g3p_c/Keq_R_TKT2); R_TKT2 is "Transketolase";
  R_TALA: M_g3p_c + M_s7p_c -> M_e4p_c + M_f6p_c; kf_R_TALA*(M_g3p_c*M_s7p_c - M_e4p_c*M_f6p_c/Keq_R_TALA); R_TALA is "Transaldolase";
  R_ADNK1: M_adn_c + M_atp_c => M_adp_c + M_amp_c + M_h_c; M_adn_c*M_atp_c*kf_R_ADNK1; R_ADNK1 is "Adenosine kinase";
  R_NTD7: M_amp_c + M_h2o_c => M_adn_c + M_pi_c; M_amp_c*kf_R_NTD7; R_NTD7 is "5'-nucleotidase (AMP)";
  R_ADA: M_adn_c + M_h2o_c => M_ins_c + M_nh3_c; M_adn_c*kf_R_ADA; R_ADA is "Adenosine deaminase";
  R_AMPDA: M_amp_c + M_h2o_c => M_imp_c + M_nh3_c; M_amp_c*kf_R_AMPDA; R_AMPDA is "Adenosine monophosphate deaminase";
  R_NTD11: M_h2o_c + M_imp_c => M_ins_c + M_pi_c; M_imp_c*kf_R_NTD11; R_NTD11 is "5'-nucleotidase (IMP)";
  R_PUNP5: M_ins_c + M_pi_c -> M_hxan_c + M_r1p_c; kf_R_PUNP5*(M_ins_c*M_pi_c - M_hxan_c*M_r1p_c/Keq_R_PUNP5); R_PUNP5 is "Purine-nucleoside phosphorylase (Inosine)";
  R_PPM: M_r1p_c -> M_r5p_c; kf_R_PPM*(M_r1p_c - M_r5p_c/Keq_R_PPM); R_PPM is "Phosphopentomutase";
  R_PRPPS: M_atp_c + M_r5p_c => M_prpp_c + M_h_c + M_amp_c; M_atp_c*M_r5p_c*kf_R_PRPPS; R_PRPPS is "Phosphoribosylpyrophosphate synthetase";
  R_ADPT: M_ade_c + M_h2o_c + M_prpp_c => M_amp_c + M_h_c + 2 M_pi_c; M_ade_c*M_prpp_c*kf_R_ADPT;
  R_ADK1: 2 M_adp_c -> M_amp_c + M_atp_c; kf_R_ADK1*(M_adp_c^2 - M_amp_c*M_atp_c/Keq_R_ADK1); R_ADK1 is "Adenylate kinase";
  R_DPGM: M__13dpg_c -> M__23dpg_c + M_h_c; kf_R_DPGM*(M__13dpg_c - M__23dpg_c/Keq_R_DPGM); R_DPGM is "Diphosphoglyceromutase";
  R_DPGase: M__23dpg_c + M_h2o_c => M__3pg_c + M_pi_c; M__23dpg_c*kf_R_DPGase; R_DPGase is "Diphosphoglycerate phosphatase";
  R_HBDPG: M__23dpg_c + M_hb_c -> M_dhb_c; kf_R_HBDPG*(M__23dpg_c*M_hb_c - M_dhb_c/Keq_R_HBDPG); R_HBDPG is "Hemoglobin-23dpg binding";
  R_HBO1: M_hb_c + M_o2_c -> M_hb_1o2_c; kf_R_HBO1*(M_hb_c*M_o2_c - M_hb_1o2_c/Keq_R_HBO1); R_HBO1 is "Oxygen Loading (1)";
  R_HBO2: M_hb_1o2_c + M_o2_c -> M_hb_2o2_c; kf_R_HBO2*(M_hb_1o2_c*M_o2_c - M_hb_2o2_c/Keq_R_HBO2); R_HBO2 is "Oxygen Loading (2)";
  R_HBO3: M_hb_2o2_c + M_o2_c -> M_hb_3o2_c; kf_R_HBO3*(M_hb_2o2_c*M_o2_c - M_hb_3o2_c/Keq_R_HBO3); R_HBO3 is "Oxygen Loading (3)";
  R_HBO4: M_hb_3o2_c + M_o2_c -> M_hb_4o2_c; kf_R_HBO4*(M_hb_3o2_c*M_o2_c - M_hb_4o2_c/Keq_R_HBO4); R_HBO4 is "Oxygen Loading (4)";
  R_ATPM: M_atp_c + M_h2o_c => M_adp_c + M_h_c + M_pi_c; M_atp_c*kf_R_ATPM; R_ATPM is "ATP maintenance requirement";
  R_DM_nadh: M_nadh_c => M_h_c + M_nad_c; M_nadh_c*kf_R_DM_nadh; R_DM_nadh is "Demand NADH";
  R_GTHOr: M_gthox_c + M_h_c + M_nadph_c -> 2 M_gthrd_c + M_nadp_c; kf_R_GTHOr*(M_gthox_c*M_nadph_c - M_gthrd_c^2*M_nadp_c/Keq_R_GTHOr); R_GTHOr is "Glutathione oxidoreductase";
  R_GSHR: 2 M_gthrd_c -> M_gthox_c + 2 M_h_c; kf_R_GSHR*(M_gthrd_c^2 - M_gthox_c/Keq_R_GSHR); R_GSHR is "Glutathione-disulfide reductase";
  R_SK_glc__D_c: $M_glc__D_b -> M_glc__D_c; kf_R_SK_glc__D_c*(M_glc__D_b - M_glc__D_c/Keq_R_SK_glc__D_c); R_SK_glc__D_c is "D-Glucose_sink";
  R_SK_pyr_c: M_pyr_c -> $M_pyr_b; kf_R_SK_pyr_c*(M_pyr_c - M_pyr_b/Keq_R_SK_pyr_c); R_SK_pyr_c is "Pyruvate_sink";
  R_SK_lac__L_c: M_lac__L_c -> $M_lac__L_b; kf_R_SK_lac__L_c*(M_lac__L_c - M_lac__L_b/Keq_R_SK_lac__L_c); R_SK_lac__L_c is "L-Lactate_sink";
  R_SK_ade_c: M_ade_c -> $M_ade_b; kf_R_SK_ade_c*(M_ade_c - M_ade_b/Keq_R_SK_ade_c); R_SK_ade_c is "Adenine_sink";
  R_SK_adn_c: M_adn_c -> $M_adn_b; kf_R_SK_adn_c*(M_adn_c - M_adn_b/Keq_R_SK_adn_c); R_SK_adn_c is "Adenosine_sink";
  R_SK_ins_c: M_ins_c -> $M_ins_b; kf_R_SK_ins_c*(M_ins_c - M_ins_b/Keq_R_SK_ins_c); R_SK_ins_c is "Inosine_sink";
  R_SK_hxan_c: M_hxan_c -> $M_hxan_b; kf_R_SK_hxan_c*(M_hxan_c - M_hxan_b/Keq_R_SK_hxan_c); R_SK_hxan_c is "Hypoxanthine_sink";
  R_SK_pi_c: M_pi_c -> $M_pi_b; kf_R_SK_pi_c*(M_pi_c - M_pi_b/Keq_R_SK_pi_c); R_SK_pi_c is "Phosphate_sink";
  R_SK_h_c: M_h_c -> $M_h_b; kf_R_SK_h_c*(M_h_c - M_h_b/Keq_R_SK_h_c); R_SK_h_c is "H+_sink";
  R_SK_h2o_c: M_h2o_c -> $M_h2o_b; kf_R_SK_h2o_c*(M_h2o_c - M_h2o_b/Keq_R_SK_h2o_c); R_SK_h2o_c is "H2O_sink";
  R_SK_co2_c: M_co2_c -> $M_co2_b; kf_R_SK_co2_c*(M_co2_c - M_co2_b/Keq_R_SK_co2_c); R_SK_co2_c is "CO2_sink";
  R_SK_nh3_c: M_nh3_c -> $M_nh3_b; kf_R_SK_nh3_c*(M_nh3_c - M_nh3_b/Keq_R_SK_nh3_c); R_SK_nh3_c is "Ammonia_sink";
  R_SK_o2_c: M_o2_c -> $M_o2_b; kf_R_SK_o2_c*(M_o2_c - M_o2_b/Keq_R_SK_o2_c); R_SK_o2_c is "Oxygen_sink";
  R_PFK_R01: M_pfk_R0_c + M_atp_c -> M_pfk_R0_A_c; kf_PFK_A*(M_atp_c*M_pfk_R0_c - M_pfk_R0_A_c/Keq_PFK_A); R_PFK_R01 is "pfk_R0-atp binding";
  R_PFK_R02: M_f6p_c + M_pfk_R0_A_c -> M_pfk_R0_AF_c; kf_PFK_F*(M_f6p_c*M_pfk_R0_A_c - M_pfk_R0_AF_c/Keq_PFK_F); R_PFK_R02 is "pfk_R0_A-f6p binding";
  R_PFK_R03: M_pfk_R0_AF_c => M_adp_c + M_fdp_c + M_h_c + M_pfk_R0_c; M_pfk_R0_AF_c*kf_PFK; R_PFK_R03 is "pfk_R0_AF catalyzation";
  R_PFK_R10: M_amp_c + M_pfk_R0_c -> M_pfk_R1_c; kf_PFK_ACT*(4*M_amp_c*M_pfk_R0_c - M_pfk_R1_c/Keq_PFK_ACT); R_PFK_R10 is "pfk_R0-amp binding";
  R_PFK_T1: M_pfk_T0_c + M_atp_c -> M_pfk_T1_c; kf_PFK_I*(4*M_atp_c*M_pfk_T0_c - M_pfk_T1_c/Keq_PFK_I); R_PFK_T1 is "pfk_T0-atp binding";
  R_PFK_R11: M_atp_c + M_pfk_R1_c -> M_pfk_R1_A_c; kf_PFK_A*(M_atp_c*M_pfk_R1_c - M_pfk_R1_A_c/Keq_PFK_A); R_PFK_R11 is "pfk_R1-atp binding";
  R_PFK_R12: M_f6p_c + M_pfk_R1_A_c -> M_pfk_R1_AF_c; kf_PFK_F*(M_f6p_c*M_pfk_R1_A_c - M_pfk_R1_AF_c/Keq_PFK_F); R_PFK_R12 is "pfk_R1_A-f6p binding";
  R_PFK_R13: M_pfk_R1_AF_c => M_adp_c + M_fdp_c + M_h_c + M_pfk_R1_c; M_pfk_R1_AF_c*kf_PFK; R_PFK_R13 is "pfk_R1_AF catalyzation";
  R_PFK_R20: M_amp_c + M_pfk_R1_c -> M_pfk_R2_c; kf_PFK_ACT*(3*M_amp_c*M_pfk_R1_c - 2*M_pfk_R2_c/Keq_PFK_ACT); R_PFK_R20 is "pfk_R1-amp binding";
  R_PFK_T2: M_atp_c + M_pfk_T1_c -> M_pfk_T2_c; kf_PFK_I*(3*M_atp_c*M_pfk_T1_c - 2*M_pfk_T2_c/Keq_PFK_I); R_PFK_T2 is "pfk_T1-atp binding";
  R_PFK_R21: M_atp_c + M_pfk_R2_c -> M_pfk_R2_A_c; kf_PFK_A*(M_atp_c*M_pfk_R2_c - M_pfk_R2_A_c/Keq_PFK_A); R_PFK_R21 is "pfk_R2-atp binding";
  R_PFK_R22: M_f6p_c + M_pfk_R2_A_c -> M_pfk_R2_AF_c; kf_PFK_F*(M_f6p_c*M_pfk_R2_A_c - M_pfk_R2_AF_c/Keq_PFK_F); R_PFK_R22 is "pfk_R2_A-f6p binding";
  R_PFK_R23: M_pfk_R2_AF_c => M_adp_c + M_fdp_c + M_h_c + M_pfk_R2_c; M_pfk_R2_AF_c*kf_PFK; R_PFK_R23 is "pfk_R2_AF catalyzation";
  R_PFK_R30: M_amp_c + M_pfk_R2_c -> M_pfk_R3_c; kf_PFK_ACT*(2*M_amp_c*M_pfk_R2_c - 3*M_pfk_R3_c/Keq_PFK_ACT); R_PFK_R30 is "pfk_R2-amp binding";
  R_PFK_T3: M_atp_c + M_pfk_T2_c -> M_pfk_T3_c; kf_PFK_I*(2*M_atp_c*M_pfk_T2_c - 3*M_pfk_T3_c/Keq_PFK_I); R_PFK_T3 is "pfk_T2-atp binding";
  R_PFK_R31: M_atp_c + M_pfk_R3_c -> M_pfk_R3_A_c; kf_PFK_A*(M_atp_c*M_pfk_R3_c - M_pfk_R3_A_c/Keq_PFK_A); R_PFK_R31 is "pfk_R3-atp binding";
  R_PFK_R32: M_f6p_c + M_pfk_R3_A_c -> M_pfk_R3_AF_c; kf_PFK_F*(M_f6p_c*M_pfk_R3_A_c - M_pfk_R3_AF_c/Keq_PFK_F); R_PFK_R32 is "pfk_R3_A-f6p binding";
  R_PFK_R33: M_pfk_R3_AF_c => M_adp_c + M_fdp_c + M_h_c + M_pfk_R3_c; M_pfk_R3_AF_c*kf_PFK; R_PFK_R33 is "pfk_R3_AF catalyzation";
  R_PFK_R40: M_amp_c + M_pfk_R3_c -> M_pfk_R4_c; kf_PFK_ACT*(M_amp_c*M_pfk_R3_c - 4*M_pfk_R4_c/Keq_PFK_ACT); R_PFK_R40 is "pfk_R3-amp binding";
  R_PFK_T4: M_atp_c + M_pfk_T3_c -> M_pfk_T4_c; kf_PFK_I*(M_atp_c*M_pfk_T3_c - 4*M_pfk_T4_c/Keq_PFK_I); R_PFK_T4 is "pfk_T3-atp binding";
  R_PFK_R41: M_atp_c + M_pfk_R4_c -> M_pfk_R4_A_c; kf_PFK_A*(M_atp_c*M_pfk_R4_c - M_pfk_R4_A_c/Keq_PFK_A); R_PFK_R41 is "pfk_R4-atp binding";
  R_PFK_R42: M_f6p_c + M_pfk_R4_A_c -> M_pfk_R4_AF_c; kf_PFK_F*(M_f6p_c*M_pfk_R4_A_c - M_pfk_R4_AF_c/Keq_PFK_F); R_PFK_R42 is "pfk_R4_A-f6p binding";
  R_PFK_R43: M_pfk_R4_AF_c => M_adp_c + M_fdp_c + M_h_c + M_pfk_R4_c; M_pfk_R4_AF_c*kf_PFK; R_PFK_R43 is "pfk_R4_AF catalyzation";
  R_PFK_L: M_pfk_R0_c -> M_pfk_T0_c; kf_R_PFK_L*(M_pfk_R0_c - M_pfk_T0_c/Keq_R_PFK_L); R_PFK_L is "pfk_R0-pfk_T0 transition";
end
